*HEADING

*NODE
       1,                      -6.,        6.000000000000002,      -1.2063374999999994
       2,                      -6.,       3.9999999999999996,      -1.2063374999999994
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**
** SOLID ELEMENTS
**
*ELEMENT, TYPE=C3D8R, ELSET=P8;Default PSOLID Property
       1,        9,        8,      908,      910,       30,       12,      915,      306
       2,        8,        9,     1008,      714,       12,       30,     1032,      865
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*ELEMENT, TYPE=C3D8R, ELSET=P12;Default PSOLID Property
      39,        3,        7,       14,        5,     1080,     1074,     1083,     1082
      44,        7,       17,       33,       14,     1074,     1101,     1103,     1083
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**
**
**
**
** RIGID BODIES
**
*RIGID BODY, REF NODE=56, ELSET=RBODY
**
**
**
**
** SURFACE INTERACTIONS
**
**
**I1;ANONYMOUS_SURF_INTERACTION
**
*SURFACE INTERACTION, NAME=I1;ANONYMOUS_SURF_INTERACTION
*SURFACE BEHAVIOR, AUGMENTED LAGRANGE, PRESSURE-OVERCLOSURE=HARD
                        ,                       0.,                       1.
*FRICTION
                     0.1,
**
** SECTION DATA
**
*SOLID SECTION, ELSET=P8;Default PSOLID Property, MATERIAL=M2;ALUMINIUM
*SOLID SECTION, ELSET=P12;Default PSOLID Property, MATERIAL=M4;STEEL_Plastic
**
** MATERIALS
**
**
**M2;ALUMINIUM
**
*MATERIAL, NAME=M2;ALUMINIUM
*DENSITY
                   3.E-9,
*ELASTIC, TYPE=ISOTROPIC
                  69297.,                     0.35
*PLASTIC, HARDENING=ISOTROPIC
                    145.,                       0.,                      20.
                    303.,                   0.0014,                      20.
                    310.,                   0.0024,                      20.
                    313.,                   0.0037,                      20.
                    316.,                   0.0055,                      20.
                    318.,                   0.0077,                      20.
                    319.,                   0.0103,                      20.
                    321.,                   0.0132,                      20.
                    323.,                   0.0164,                      20.
                    325.,                   0.0199,                      20.
                    327.,                   0.0236,                      20.
                    330.,                   0.0276,                      20.
                    332.,                   0.0318,                      20.
                    334.,                   0.0363,                      20.
                    337.,                   0.0411,                      20.
                    339.,                   0.0462,                      20.
                    341.,                   0.0517,                      20.
                    344.,                    0.062,                      20.
                    400.,                       1.,                      20.
**
**M4;STEEL_Plastic
**
*MATERIAL, NAME=M4;STEEL_Plastic
*DENSITY
                 7.85E-9,
*ELASTIC, TYPE=ISOTROPIC
                 210000.,                      0.3
*PLASTIC, HARDENING=ISOTROPIC
                    480.,                       0.,                      20.
                    553.,                 0.002308,                      20.
                    625.,                 0.005055,                      20.
                    676.,                  0.00896,                      20.
                    709.,                 0.014308,                      20.
                    750.,                 0.020301,                      20.
                    800.,                      0.5,                      20.
**
** AMPLITUDES
**
*AMPLITUDE, NAME=A1;AMPLITUDE_00000000, DEFINITION=SMOOTH STEP, VALUE=RELATIVE, TIME=STEP TIME
                      0.,                       0.,                      0.5,                       1.,                       1.,                       0.
**
**
**
**
** CONTACT DEFINITIONS
**
*CONTACT
*CONTACT INCLUSIONS
S4;BODY_1, S5;BODY_2
*CONTACT PROPERTY ASSIGNMENT
S4;BODY_1, S5;BODY_2, I1;ANONYMOUS_SURF_INTERACTION
**
** SURFACE DEFINITIONS
**
*SURFACE, NAME=S4;BODY_1, TYPE=ELEMENT
BODY_1,
*SURFACE, NAME=S5;BODY_2, TYPE=ELEMENT
BODY_2,
**
** SETS
**
*ELSET, ELSET=RBODY
      52,       54,       57,       60,       78,       83,       88,       90,       93,       96,
      98,      124,      126,      129,      132,      160
*ELSET, ELSET=BODY_1
P12;Default PSOLID Property,
*ELSET, ELSET=BODY_2
P8;Default PSOLID Property,
*NSET, NSET=BC_1
     222,      232,      251,      272,      289,      301
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*NSET, NSET=BC_Load
      56,
**
** BOUNDARY
**
*BOUNDARY, TYPE=DISPLACEMENT
BC_1,        1,        6,                       0.
BC_Load,        1,        2,                       0.
BC_Load,        4,        6,                       0.
**
** STEPS
**
**
** STEP 1
**
*STEP, NAME=Anonymous STEP 1, NLGEOM=YES, UNSYMM=YES
*STATIC
                    0.01,                       1.
**
** BOUNDARY
**
*BOUNDARY, TYPE=DISPLACEMENT, AMPLITUDE=A1;AMPLITUDE_00000000
BC_Load,        3,         ,                      -1.
*OUTPUT, FIELD, FREQUENCY=10
*ELEMENT OUTPUT
LE,
S,
TRIAX,
LODE,
*NODE OUTPUT, VARIABLE=PRESELECT
*END STEP
